# OpenSim document version 40500
Model Static_01_scaled:
  gravity: 0 -9.80665 0
  length_units: meters
  force_units: N
  credits:
    Delp S.L., Loan J.P., Hoy M.G., Zajac F.E., Topp E.L., Rosen J.M., Thelen D.G., Anderson F.C., Seth A., Hamner S.R.
  publications:
    Whole body model that consists of 23 bodies, 42 degrees of freedom and 30 muscles. The whole-body geometric model and the lower limbs, pelvis and upper limbs anthropometry are based on the running model of Hammer et al. 2010 which consists of 12 segments and 29 degrees of freedom. Extra segments and degrees of freedom were later added based on Dumas et al. 2007. Muscles …Each lower extremity had seven degrees-of-freedom; the hip was modeled as a ball-and-socket joint (3 dofs), the knee was modeled as a revolute joint with 1 dof, the ankle was modeled as 2 revolute joints and feet toes with one revolute joint. The pelvis joint was model as a free flyer joint (6 dofs) to allow the model to translate and rotate in the 3D space, the lumbar motion was modeled as a ball-and-socket joint (3 dofs) (Anderson and Pandy, 1999) and the neck joint was modeled as a ball-and-socket joint (3 dofs). Mass properties of the torso and head (including the neck) segments were estimated from Dumas et al., 2007. Each arm consisted of 8 degrees-of-freedom; the shoulder was modeled as a ball-and-socket joint (3 dofs), the elbow and forearm rotation were each modeled with revolute joints (1 dof) (Holzbaur et al., 2005), the wrist flexion and deviation were each modeled with revolute joints and the hand fingers were modeled with 1 revolute joint. Mass properties for the arms were estimated from 1 and de Leva, 1996. The model also include 30 superficial muscles of the whole body..
  Ground
  BodySet:
    Body torso: mass=18.72304 [kg] mass_center=(0.003148087 0.2581431 0) inertia=(0.6079514 0.6079514 0.8192427 0 0 0)
        meshes=(thorax.vtp groundspine.vtp)
    Body clavicle_r: mass=0.1372554 mass_center=(-0.02279215 0.01056708 0.07034925)
        inertia=(6.200629e-6 2.548071e-5 2.354301e-5 -6.491284e-6 -9.204059e-6 2.80966e-6) meshes=clavicle.vtp
    Body scapula_r: mass=0.6206408 mass_center=(-0.04839659 -0.03347466 -0.04790339)
        inertia=(0.0009688483 0.0009688483 0.0009688483 0 0 0) meshes=scapula.vtp
    Body head_and_neck: mass=4.126461 mass_center=(-0.006296174 0.156355 0)
        inertia=(0.0259975 0.01690786 0.02609438 0.0002191254 0.0002434726 0.0001082107) meshes=(jaw.vtp skull.vtp)
    Body humerus_r: mass=1.78828 mass_center=(0 -0.1527682 0) inertia=(0.009064645 0.003127022 0.01017477 0 0 0)
        meshes=humerus_rv.vtp
    Body ulna_r: mass=0.5345042 mass_center=(0 -0.1035534 0) inertia=(0.00192382 0.0004013912 0.002086845 0 0 0)
        meshes=ulna_rv.vtp
    Body radius_r: mass=0.5345042 mass_center=(0 -0.1035534 0) inertia=(0.00192382 0.0004013912 0.002086845 0 0 0)
        meshes=radius_rv.vtp
    Body lunate_r: mass=0.008798423 mass_center=(0 0 0) inertia=(8.798423e-6 8.798423e-6 8.798423e-6 0 0 0)
        meshes=lunate_rvs.vtp
    Body hand_r: mass=0.4025279 mass_center=(0 -0.07391275 0) inertia=(0.0009246512 0.0005670227 0.00138905 0 0 0)
        meshes=(pisiform_rvs.vtp scaphoid_rvs.vtp triquetrum_rvs.vtp hamate_rvs.vtp capitate_rvs.vtp trapezoid_rvs.vtp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)
    Body fingers_r: mass=0.08798423 mass_center=(0 -0.068095 0) inertia=(0.0008798423 0.0008798423 0.0008798423 0 0 0)
        meshes=(index_proximal_rvs.vtp index_medial_rvs.vtp index_distal_rvs.vtp middle_proximal_rvs.vtp middle_medial_rvs.vtp middle_distal_rvs.vtp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)
  JointSet:
    CustomJoint ground_torso: socket_parent_frame=ground_offset socket_child_frame=torso_offset
      Coordinate trunk_rz: default_value=0 range=(-3.1416 3.1416) clamped=true
      Coordinate trunk_rx: default_value=0 range=(-3.1416 3.1416) clamped=true
      Coordinate trunk_ry: default_value=0 range=(-3.1416 3.1416) clamped=true
      Coordinate trunk_tx: default_value=0 range=(-10 10) clamped=false
      Coordinate trunk_ty: default_value=0 range=(-6 6) clamped=false
      Coordinate trunk_tz: default_value=0 range=(-5 5) clamped=false
      PhysicalOffsetFrame ground_offset: socket_parent=/ground translation=(0 0 0) [meters]
      PhysicalOffsetFrame torso_offset: socket_parent=/bodyset/torso translation=(0 0 0)
      SpatialTransform:
        TransformAxis rotation1: coordinates=trunk_rz axis=(0 0 1) LinearFunction(coefficients=1 0)
        TransformAxis rotation2: coordinates=trunk_rx axis=(1 0 0) LinearFunction(coefficients=1 0)
        TransformAxis rotation3: coordinates=trunk_ry axis=(0 1 0) LinearFunction(coefficients=1 0)
        TransformAxis translation1: coordinates=trunk_tx axis=(1 0 0) LinearFunction(coefficients=1 0)
        TransformAxis translation2: coordinates=trunk_ty axis=(0 1 0) LinearFunction(coefficients=1 0)
        TransformAxis translation3: coordinates=trunk_tz axis=(0 0 1) LinearFunction(coefficients=1 0)
    CustomJoint sternoclavicular: socket_parent_frame=torso_offset socket_child_frame=clavicle_r_offset
      Coordinate clav_prot: default_value=0 range=(-0.7853982 0.7853982) clamped=true
      Coordinate clav_elev: default_value=0 range=(-0.7853982 0.7853982) clamped=true
      PhysicalOffsetFrame torso_offset: socket_parent=/bodyset/torso translation=(0.006637217 0.007272081 0.02672201)
      PhysicalOffsetFrame clavicle_r_offset: socket_parent=/bodyset/clavicle_r translation=(0 0 0)
      SpatialTransform: axes_held_at_zero=(rotation3 translation1 translation2 translation3)
        TransformAxis rotation1: coordinates=clav_prot axis=(0.0153 0.9892987 -0.1451) LinearFunction(coefficients=1 0)
        TransformAxis rotation2: coordinates=clav_elev axis=(-0.9944725 0 -0.104997) LinearFunction(coefficients=1 0)
    ScapulothoracicJoint scapulothoracic: socket_parent_frame=torso_offset socket_child_frame=scapula_r_offset
        thoracic_ellipsoid_radii_x_y_z=(0.07345536 0.1574044 0.07345536) scapula_winging_axis_origin=(0 0)
        scapula_winging_axis_direction=0 [radians]
      Coordinate scapula_abduction: default_value=0 range=(-0.7853982 0.7853982) clamped=true
      Coordinate scapula_elevation: default_value=0 range=(-0.7853982 0.7853982) clamped=true
      Coordinate scapula_upward_rot: default_value=0 range=(-0.7853982 0.7853982) clamped=true
      Coordinate scapula_winging: default_value=0 range=(-0.7853982 0.7853982) clamped=false
      PhysicalOffsetFrame torso_offset: socket_parent=/bodyset/torso translation=(-0.02098725 -0.01815397 0.07345536)
          orientation=(0 -0.87 0) [radians]
      PhysicalOffsetFrame scapula_r_offset: socket_parent=/bodyset/scapula_r
          translation=(-0.06277286 -0.04096711 -0.05876429) orientation=(-0.5181 -1.1416 -0.2854)
    CustomJoint neck: socket_parent_frame=torso_offset socket_child_frame=head_and_neck_offset
      Coordinate neck_flexion: default_value=0 range=(-1.74533 1.047198) clamped=true
      Coordinate neck_lateral_bending: default_value=0 range=(-0.6 0.6) clamped=true
      Coordinate neck_rotation: default_value=0 range=(-1.2217 1.2217) clamped=true
      PhysicalOffsetFrame torso_offset: socket_parent=/bodyset/torso translation=(-0.01049362 0.4669662 0)
      PhysicalOffsetFrame head_and_neck_offset: socket_parent=/bodyset/head_and_neck translation=(0 0 0)
      SpatialTransform: axes_held_at_zero=(translation1 translation2 translation3)
        TransformAxis rotation1: coordinates=neck_flexion axis=(0 0 1) LinearFunction(coefficients=1 0)
        TransformAxis rotation2: coordinates=neck_lateral_bending axis=(1 0 0) LinearFunction(coefficients=1 0)
        TransformAxis rotation3: coordinates=neck_rotation axis=(0 1 0) LinearFunction(coefficients=1 0)
    CustomJoint glenohumeral: socket_parent_frame=scapula_r_offset socket_child_frame=humerus_r_offset
      Coordinate shoulder_elv: default_value=0.1745329 range=(-1.570796 2.53) clamped=false
      Coordinate plane_of_elev: default_value=0 range=(-1.570796 3.141593) clamped=true
      Coordinate axial_rot: default_value=0 range=(-3.141593 3.141593) clamped=true
      PhysicalOffsetFrame scapula_r_offset: socket_parent=/bodyset/scapula_r
          translation=(-0.01002141 -0.03567832 0.009444261)
      PhysicalOffsetFrame humerus_r_offset: socket_parent=/bodyset/humerus_r translation=(0 0 0)
      SpatialTransform: axes_held_at_zero=(translation1 translation2 translation3)
        TransformAxis rotation1: coordinates=shoulder_elv axis=(-0.993 -0.0793 0.0879) LinearFunction(coefficients=1 0)
        TransformAxis rotation2: coordinates=plane_of_elev axis=(0.0828 0.0654 0.9944) LinearFunction(coefficients=1 0)
        TransformAxis rotation3: coordinates=axial_rot axis=(-0.0846 0.9947 -0.0584) LinearFunction(coefficients=1 0)
    CustomJoint elbow_r: socket_parent_frame=humerus_r_offset socket_child_frame=ulna_r_offset
      Coordinate elbow_flex_r: default_value=0 range=(0 3.1416) clamped=true
      PhysicalOffsetFrame humerus_r_offset: socket_parent=/bodyset/humerus_r
          translation=(0.01220645 -0.2658533 -0.008910595)
      PhysicalOffsetFrame ulna_r_offset: socket_parent=/bodyset/ulna_r translation=(0 0 0)
      SpatialTransform: axes_held_at_zero=(rotation2 rotation3 translation1 translation2 translation3)
        TransformAxis rotation1: coordinates=elbow_flex_r axis=(0.226047 0.022269 0.9738618)
            LinearFunction(coefficients=1 0)
    CustomJoint radioulnar_r: socket_parent_frame=ulna_r_offset socket_child_frame=radius_r_offset
      Coordinate pro_sup_r: default_value=1.570796 range=(-3.1416 3.1416) clamped=true
      PhysicalOffsetFrame ulna_r_offset: socket_parent=/bodyset/ulna_r
          translation=(-0.005779745 -0.01117543 0.02241015)
      PhysicalOffsetFrame radius_r_offset: socket_parent=/bodyset/radius_r translation=(0 0 0)
      SpatialTransform: axes_held_at_zero=(rotation2 rotation3 translation1 translation2 translation3)
        TransformAxis rotation1: coordinates=pro_sup_r axis=(0.05639803 0.9984065 0.001952)
            LinearFunction(coefficients=1 0)
    CustomJoint radius_lunate_r: socket_parent_frame=radius_r_offset socket_child_frame=lunate_r_offset
      Coordinate wrist_flex_r: default_value=0 range=(-1.5708 1.5708) clamped=true
      PhysicalOffsetFrame radius_r_offset: socket_parent=/bodyset/radius_r
          translation=(-0.007558261 -0.2026313 0.01169352) orientation=(0.1 0 0)
      PhysicalOffsetFrame lunate_r_offset: socket_parent=/bodyset/lunate_r translation=(0 0 0)
      SpatialTransform: axes_held_at_zero=(rotation2 rotation3 translation1 translation2 translation3)
        TransformAxis rotation1: coordinates=wrist_flex_r axis=(0 0 1) LinearFunction(coefficients=1 0)
    CustomJoint lunate_hand_r: socket_parent_frame=lunate_r_offset socket_child_frame=hand_r_offset
      Coordinate wrist_dev_r: default_value=0 range=(-0.4363323 0.6108652) clamped=true
      PhysicalOffsetFrame lunate_r_offset: socket_parent=/bodyset/lunate_r translation=(0 0 0)
      PhysicalOffsetFrame hand_r_offset: socket_parent=/bodyset/hand_r translation=(0 0 0)
      SpatialTransform: axes_held_at_zero=(rotation1 rotation3 translation1 translation2 translation3)
        TransformAxis rotation2: coordinates=wrist_dev_r axis=(1 0 0) LinearFunction(coefficients=1 0)
    CustomJoint fingers_r: socket_parent_frame=hand_r_offset socket_child_frame=fingers_r_offset
      Coordinate hand_finger_flex_r: default_value=0 range=(-1.5708 1.5708) clamped=true
      PhysicalOffsetFrame hand_r_offset: socket_parent=/bodyset/hand_r translation=(0 -0.08357855 -0.01085436)
      PhysicalOffsetFrame fingers_r_offset: socket_parent=/bodyset/fingers_r translation=(0 0 0)
      SpatialTransform: axes_held_at_zero=(rotation2 rotation3 translation1 translation2 translation3)
        TransformAxis rotation1: coordinates=hand_finger_flex_r axis=(0 0 1) LinearFunction(coefficients=1 0)
  ConstraintSet:
    PointConstraint AC_r: socket_body_1=/bodyset/clavicle_r socket_body_2=/bodyset/scapula_r
        location_body_1=(-0.02924 0.02024 0.12005) location_body_2=(-0.01357 0.00011 -0.01523)
  MarkerSet:
    Marker ACD: scapula_r (-0.009830171 0.03080495 -0.02435974)
    Marker CLAD: torso (0.0151569 0.007156886 0.08945914)
    Marker CLAG: torso (0.01903467 0.01287704 -0.07612902)
    Marker MAN: torso (0.04733074 -0.00376644 0.0009343667)
    Marker XYP: torso (0.114715 -0.2024943 -0.001067538)
    Marker T8: torso (-0.119228 -0.162854 0.0003276919)
    Marker MTACM: scapula_r (-0.07974797 0.01179841 -0.06170676)
    Marker MTACB: scapula_r (-0.1068335 -0.03333978 -0.03991606)
    Marker MTACL: scapula_r (-0.07863867 0.02013939 -0.01932016)
    Marker MTHA: humerus_r (-0.01268071 -0.134006 0.0577166)
    Marker MTHP: humerus_r (-0.003070174 -0.1705567 0.04718198)
    Marker MTBA: humerus_r (-0.05004577 -0.1552822 0.01180988)
    Marker MTBP: humerus_r (-0.02736442 -0.1748132 0.03453511)
    Marker EL: humerus_r (0.01521339 -0.2663856 0.02398958)
    Marker EM: humerus_r (0.002895248 -0.2641598 -0.03308708)
    Marker PSU: radius_r (-0.03230239 -0.1985648 -0.002410748) fixed=true
    Marker PSR: radius_r (-0.01499216 -0.2222554 0.04315712)
    Marker MC5: hand_r (-0.02047172 -0.08869321 -0.034344)
    Marker MC2: hand_r (-0.02230915 -0.1006038 0.02645781)
    Marker C7: torso (-0.07944469 0.06978095 -0.006377516)
