# OpenSim document version 40500
MarkerSet:
  Marker ACD: scapula_r (-0.009830171 0.03080495 -0.02435974)
  Marker CLAD: torso (0.0151569 0.007156886 0.08945914)
  Marker CLAG: torso (0.01903467 0.01287704 -0.07612902)
  Marker MAN: torso (0.04733074 -0.00376644 0.0009343667)
  Marker XYP: torso (0.114715 -0.2024943 -0.001067538)
  Marker T8: torso (-0.119228 -0.162854 0.0003276919)
  Marker MTACM: scapula_r (-0.07974797 0.01179841 -0.06170676)
  Marker MTACB: scapula_r (-0.1068335 -0.03333978 -0.03991606)
  Marker MTACL: scapula_r (-0.07863867 0.02013939 -0.01932016)
  Marker MTHA: humerus_r (-0.01268071 -0.134006 0.0577166)
  Marker MTHP: humerus_r (-0.003070174 -0.1705567 0.04718198)
  Marker MTBA: humerus_r (-0.05004577 -0.1552822 0.01180988)
  Marker MTBP: humerus_r (-0.02736442 -0.1748132 0.03453511)
  Marker EL: humerus_r (0.01521339 -0.2663856 0.02398958)
  Marker EM: humerus_r (0.002895248 -0.2641598 -0.03308708)
  Marker PSU: radius_r (-0.03230239 -0.1985648 -0.002410748) fixed=true
  Marker PSR: radius_r (-0.01499216 -0.2222554 0.04315712)
  Marker MC5: hand_r (-0.02047172 -0.08869321 -0.034344)
  Marker MC2: hand_r (-0.02230915 -0.1006038 0.02645781)
  Marker C7: torso (-0.07944469 0.06978095 -0.006377516)
