# OpenSim document version 30000
ScaleTool Static_01_scaled:
  mass: 26.964
  height: 171
  age: 25
  report_errors: true
  GenericModelMaker:
    model_file: C:\Users\slhad\Documents\OpenSim\Models\upperlimb-biorob.osim
  ModelScaler:
    apply: true
    scaling_order: measurements
    marker_file: C:\Users\slhad\Documents\OpenSim\Motion data\01_02_\01_Static.trc
    time_range: 0.5 4.5
    preserve_mass_distribution: true
    output_model_file: Model_01_scaled_step1.osim
    output_scale_file: Model_01_scaled_step1_output.xml
    MeasurementSet: file=Scaling_measure_set_01.xml
  MarkerPlacer:
    apply: true
    marker_file: C:\Users\slhad\Documents\OpenSim\Motion data\01_02_\01_Static.trc
    time_range: 0.5 4.5
    output_motion_file: Model_01_scaled_motion.mot
    output_model_file: Model_01_scaled_final.osim
    output_marker_file: Model_01_scaled_output.osim
    max_marker_movement: -1
    IKTaskSet: file=Scaling_task_01.xml
