# OpenSim document version 30000
Model Two-arms-only:
  length_units: meters
  force_units: N
  gravity: 0 -9.80665 0
  credits:
    Delp S.L., Loan J.P., Hoy M.G., Zajac F.E., Topp E.L., Rosen J.M., Thelen D.G., Anderson F.C., Seth A., Hamner S.R.
  publications:
    Whole body model that consists of 23 bodies, 42 degrees of freedom and 30 muscles. The whole-body geometric model and the lower limbs, pelvis and upper limbs anthropometry are based on the running model of Hammer et al. 2010 which consists of 12 segments and 29 degrees of freedom. Extra segments and degrees of freedom were later added based on Dumas et al. 2007. Muscles …Each lower extremity had seven degrees-of-freedom; the hip was modeled as a ball-and-socket joint (3 dofs), the knee was modeled as a revolute joint with 1 dof, the ankle was modeled as 2 revolute joints and feet toes with one revolute joint. The pelvis joint was model as a free flyer joint (6 dofs) to allow the model to translate and rotate in the 3D space, the lumbar motion was modeled as a ball-and-socket joint (3 dofs) (Anderson and Pandy, 1999) and the neck joint was modeled as a ball-and-socket joint (3 dofs). Mass properties of the torso and head (including the neck) segments were estimated from Dumas et al., 2007. Each arm consisted of 8 degrees-of-freedom; the shoulder was modeled as a ball-and-socket joint (3 dofs), the elbow and forearm rotation were each modeled with revolute joints (1 dof) (Holzbaur et al., 2005), the wrist flexion and deviation were each modeled with revolute joints and the hand fingers were modeled with 1 revolute joint. Mass properties for the arms were estimated from 1 and de Leva, 1996. The model also include 30 superficial muscles of the whole body..
  BodySet:
    Body ground: mass=0 mass_center=(0 0 0) inertia_xx=0 inertia_yy=0 inertia_zz=0
    Body torso: mass=21.28 mass_center=(0.003 0.246 0) inertia_xx=0.6274994 inertia_yy=0.6274994 inertia_zz=0.8455845
        meshes=(hat_spine.vtp hat_ribs_scap.vtp)
      CustomJoint ground_torso: parent_body=ground location_in_parent=(0 0 0) location=(0 0 0)
        Coordinate torso_tilt: motion_type=rotational default_value=0 range=(-3.141593 3.141593) clamped=true
        Coordinate torso_list: motion_type=rotational default_value=0 range=(-3.141593 3.141593) clamped=true
        Coordinate torso_rotation: motion_type=rotational default_value=0 range=(-3.141593 3.141593) clamped=true
        Coordinate torso_tx: motion_type=translational default_value=0 range=(-5 5) clamped=true
        Coordinate torso_ty: motion_type=translational default_value=1 range=(-2 4) clamped=true
        Coordinate torso_tz: motion_type=translational default_value=0 range=(-5 5) clamped=true
        SpatialTransform:
          TransformAxis rotation1: coordinates=torso_tilt axis=(0 0 1) LinearFunction(coefficients=1 0)
          TransformAxis rotation2: coordinates=torso_list axis=(1 0 0) LinearFunction(coefficients=1 0)
          TransformAxis rotation3: coordinates=torso_rotation axis=(0 1 0) LinearFunction(coefficients=1 0)
          TransformAxis translation1: coordinates=torso_tx axis=(1 0 0) LinearFunction(coefficients=1 0)
          TransformAxis translation2: coordinates=torso_ty axis=(0 1 0) LinearFunction(coefficients=1 0)
          TransformAxis translation3: coordinates=torso_tz axis=(0 0 1) LinearFunction(coefficients=1 0)
    Body head_and_neck: mass=4.69 mass_center=(-0.006 0.149 0) inertia_xx=0.0268334 inertia_yy=0.0174515
        inertia_zz=0.0269334 inertia_xy=0.000226171 inertia_xz=0.000251301 inertia_yz=0.00011169
        meshes=(jaw.vtp skull.vtp)
      CustomJoint neck: parent_body=torso location_in_parent=(-0.01 0.445 0) location=(0 0 0)
        Coordinate neck_flexion: motion_type=rotational default_value=0 range=(-1.74533 1.047198) clamped=true
        Coordinate neck_lateral_bending: motion_type=rotational default_value=0 range=(-0.6 0.6) clamped=true
        Coordinate neck_rotation: motion_type=rotational default_value=0 range=(-1.2217 1.2217) clamped=true
        SpatialTransform: axes_held_at_zero=(translation1 translation2 translation3)
          TransformAxis rotation1: coordinates=neck_flexion axis=(0 0 1) LinearFunction(coefficients=1 0)
          TransformAxis rotation2: coordinates=neck_lateral_bending axis=(1 0 0) LinearFunction(coefficients=1 0)
          TransformAxis rotation3: coordinates=neck_rotation axis=(0 1 0) LinearFunction(coefficients=1 0)
    Body humerus_r: mass=2.0325 mass_center=(0 -0.164502 0) inertia_xx=0.011946 inertia_yy=0.004121 inertia_zz=0.013409
        meshes=humerus_rv.vtp
      CustomJoint acromial_r: parent_body=torso location_in_parent=(0.003155 0.3715 0.17) location=(0 0 0)
        Coordinate arm_flex_r: motion_type=rotational default_value=0 range=(-1.570796 3.1416) clamped=false
        Coordinate arm_add_r: motion_type=rotational default_value=0 range=(-3.8397 1.570796) clamped=false
        Coordinate arm_rot_r: motion_type=rotational default_value=0 range=(-1.570796 1.570796) clamped=false
        SpatialTransform: axes_held_at_zero=(translation1 translation2 translation3)
          TransformAxis rotation1: coordinates=arm_flex_r axis=(0 0 1) LinearFunction(coefficients=1 0)
          TransformAxis rotation2: coordinates=arm_add_r axis=(1 0 0) LinearFunction(coefficients=1 0)
          TransformAxis rotation3: coordinates=arm_rot_r axis=(0 1 0) LinearFunction(coefficients=1 0)
    Body ulna_r: mass=0.6075 mass_center=(0 -0.120525 0) inertia_xx=0.002962 inertia_yy=0.000618 inertia_zz=0.003213
        meshes=ulna_rv.vtp
      CustomJoint elbow_r: parent_body=humerus_r location_in_parent=(0.013144 -0.286273 -0.009595) location=(0 0 0)
        Coordinate elbow_flex_r: motion_type=rotational default_value=0 range=(0 3.1416) clamped=true
        SpatialTransform: axes_held_at_zero=(rotation2 rotation3 translation1 translation2 translation3)
          TransformAxis rotation1: coordinates=elbow_flex_r axis=(0.226047 0.022269 0.9738618)
              LinearFunction(coefficients=1 0)
    Body radius_r: mass=0.6075 mass_center=(0 -0.120525 0) inertia_xx=0.002962 inertia_yy=0.000618 inertia_zz=0.003213
        meshes=radius_rv.vtp
      CustomJoint radioulnar_r: parent_body=ulna_r location_in_parent=(-0.006727 -0.013007 0.026083) location=(0 0 0)
        Coordinate pro_sup_r: motion_type=rotational default_value=-7.34641e-6 range=(-3.1416 3.1416) clamped=false
        SpatialTransform: axes_held_at_zero=(rotation2 rotation3 translation1 translation2 translation3)
          TransformAxis rotation1: coordinates=pro_sup_r axis=(0.05639803 0.9984065 0.001952)
              LinearFunction(coefficients=1 0)
    Body lunate_r: mass=0.01 mass_center=(0 0 0) inertia_xx=1e-5 inertia_yy=1e-5 inertia_zz=1e-5 meshes=lunate_rvs.vtp
      CustomJoint radius_lunate_r: parent_body=radius_r location_in_parent=(-0.008797 -0.235841 0.01361)
          orientation_in_parent=(0.1 0 0) location=(0 0 0)
        Coordinate wrist_flex_r: motion_type=rotational default_value=0 range=(-1.5708 1.5708) clamped=true
        SpatialTransform: axes_held_at_zero=(rotation2 rotation3 translation1 translation2 translation3)
          TransformAxis rotation1: coordinates=wrist_flex_r axis=(0 0 1) LinearFunction(coefficients=1 0)
    Body hand_r: mass=0.4575 mass_center=(0 -0.068095 0) inertia_xx=0.000892 inertia_yy=0.000547 inertia_zz=0.00134
        meshes=(pisiform_rvs.vtp scaphoid_rvs.vtp triquetrum_rvs.vtp hamate_rvs.vtp capitate_rvs.vtp trapezoid_rvs.vtp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)
      CustomJoint lunate_hand_r: parent_body=lunate_r location_in_parent=(0 0 0) location=(0 0 0)
        Coordinate wrist_dev_r: motion_type=rotational default_value=0 range=(-0.4363323 0.6108652) clamped=true
        SpatialTransform: axes_held_at_zero=(rotation1 rotation3 translation1 translation2 translation3)
          TransformAxis rotation2: coordinates=wrist_dev_r axis=(1 0 0) LinearFunction(coefficients=1 0)
    Body fingers_r: mass=0.1 mass_center=(0 -0.068095 0) inertia_xx=0.001 inertia_yy=0.001 inertia_zz=0.001
        meshes=(index_proximal_rvs.vtp index_medial_rvs.vtp index_distal_rvs.vtp middle_proximal_rvs.vtp middle_medial_rvs.vtp middle_distal_rvs.vtp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)
      CustomJoint fingers_r: parent_body=hand_r location_in_parent=(0 -0.077 -0.01) location=(0 0 0)
        Coordinate hand_finger_flex_r: motion_type=rotational default_value=0 range=(-1.5708 1.5708) clamped=true
        SpatialTransform: axes_held_at_zero=(rotation2 rotation3 translation1 translation2 translation3)
          TransformAxis rotation1: coordinates=hand_finger_flex_r axis=(0 0 1) LinearFunction(coefficients=1 0)
    Body humerus_l: mass=2.0325 mass_center=(0 -0.164502 0) inertia_xx=0.011946 inertia_yy=0.004121 inertia_zz=0.013409
        meshes=humerus_lv.vtp
      CustomJoint acromial_l: parent_body=torso location_in_parent=(0.003155 0.3715 -0.17) location=(0 0 0)
        Coordinate arm_flex_l: motion_type=rotational default_value=0 range=(-1.570796 3.1416) clamped=false
        Coordinate arm_add_l: motion_type=rotational default_value=0 range=(-3.8397 1.570796) clamped=false
        Coordinate arm_rot_l: motion_type=rotational default_value=0 range=(-1.570796 1.570796) clamped=false
        SpatialTransform: axes_held_at_zero=(translation1 translation2 translation3)
          TransformAxis rotation1: coordinates=arm_flex_l axis=(0 0 1) LinearFunction(coefficients=1 0)
          TransformAxis rotation2: coordinates=arm_add_l axis=(-1 0 0) LinearFunction(coefficients=1 0)
          TransformAxis rotation3: coordinates=arm_rot_l axis=(0 -1 0) LinearFunction(coefficients=1 0)
    Body ulna_l: mass=0.6075 mass_center=(0 -0.120525 0) inertia_xx=0.002962 inertia_yy=0.000618 inertia_zz=0.003213
        meshes=ulna_lv.vtp
      CustomJoint elbow_l: parent_body=humerus_l location_in_parent=(0.013144 -0.286273 0.009595) location=(0 0 0)
        Coordinate elbow_flex_l: motion_type=rotational default_value=0 range=(0 3.1416) clamped=true
        SpatialTransform: axes_held_at_zero=(rotation2 rotation3 translation1 translation2 translation3)
          TransformAxis rotation1: coordinates=elbow_flex_l axis=(-0.226047 -0.022269 0.9738618)
              LinearFunction(coefficients=1 0)
    Body radius_l: mass=0.6075 mass_center=(0 -0.120525 0) inertia_xx=0.002962 inertia_yy=0.000618 inertia_zz=0.003213
        meshes=radius_lv.vtp
      CustomJoint radioulnar_l: parent_body=ulna_l location_in_parent=(-0.006727 -0.013007 -0.026083) location=(0 0 0)
        Coordinate pro_sup_l: motion_type=rotational default_value=0 range=(-3.1416 3.1416) clamped=false
        SpatialTransform: axes_held_at_zero=(rotation2 rotation3 translation1 translation2 translation3)
          TransformAxis rotation1: coordinates=pro_sup_l axis=(-0.05639803 -0.9984065 0.001952)
              LinearFunction(coefficients=1 0)
    Body lunate_l: mass=0.01 mass_center=(0 0 0) inertia_xx=1e-5 inertia_yy=1e-5 inertia_zz=1e-5 meshes=lunate_lvs.vtp
      CustomJoint radius_lunate_l: parent_body=radius_l location_in_parent=(-0.008797 -0.235841 -0.01361)
          location=(0 0 0)
        Coordinate wrist_flex_l: motion_type=rotational default_value=0 range=(-1.5708 1.5708) clamped=true
        SpatialTransform: axes_held_at_zero=(rotation2 rotation3 translation1 translation2 translation3)
          TransformAxis rotation1: coordinates=wrist_flex_l axis=(0 0 1) LinearFunction(coefficients=1 0)
    Body hand_l: mass=0.4575 mass_center=(0 -0.068095 0) inertia_xx=0.000892 inertia_yy=0.000547 inertia_zz=0.00134
        meshes=(pisiform_lvs.vtp scaphoid_lvs.vtp triquetrum_lvs.vtp hamate_lvs.vtp capitate_lvs.vtp trapezoid_lvs.vtp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)
      CustomJoint lunate_hand_l: parent_body=lunate_l location_in_parent=(0 0 0) location=(0 0 0)
        Coordinate wrist_dev_l: motion_type=rotational default_value=0 range=(-0.4363323 0.6108652) clamped=true
        SpatialTransform: axes_held_at_zero=(rotation1 rotation3 translation1 translation2 translation3)
          TransformAxis rotation2: coordinates=wrist_dev_l axis=(-1 0 0) LinearFunction(coefficients=1 0)
    Body fingers_l: mass=0.1 mass_center=(0 -0.068095 0) inertia_xx=0.001 inertia_yy=0.001 inertia_zz=0.001
        meshes=(index_proximal_lvs.vtp index_medial_lvs.vtp index_distal_lvs.vtp middle_proximal_lvs.vtp middle_medial_lvs.vtp middle_distal_lvs.vtp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)
      CustomJoint fingers_l: parent_body=hand_l location_in_parent=(0 -0.077 0.01) location=(0 0 0)
        Coordinate hand_finger_flex_l: motion_type=rotational default_value=0 range=(-1.5708 1.5708) clamped=true
        SpatialTransform: axes_held_at_zero=(rotation2 rotation3 translation1 translation2 translation3)
          TransformAxis rotation1: coordinates=hand_finger_flex_l axis=(0 0 1) LinearFunction(coefficients=1 0)
  ForceSet:
    Schutte1993Muscle_Deprecated ant_delt_r: max_isometric_force=1142.6 optimal_fiber_length=0.0976
        tendon_slack_length=0.093 pennation_angle_at_optimal=0.3839724 [radians]
      PathPoint DELT1-P1: humerus_r (0.00896 -0.11883 0.00585)
      PathPoint DELT1-P2: humerus_r (0.01623 -0.11033 0.00412)
      PathPoint DELT1-P3: humerus_r (0.05 0.02 0)
      PathPoint DELT1-P4: torso (0.02 0.39 0.07)
    Schutte1993Muscle_Deprecated ant_delt_l: max_isometric_force=1142.6 optimal_fiber_length=0.0976
        tendon_slack_length=0.093 pennation_angle_at_optimal=0.3839724
      PathPoint DELT1-P1: humerus_l (0.00896 -0.11883 -0.00585)
      PathPoint DELT1-P2: humerus_l (0.01623 -0.11033 0.00412)
      PathPoint DELT1-P3: humerus_l (0.05 0.02 0)
      PathPoint DELT1-P4: torso (0.02 0.39 -0.07)
    Schutte1993Muscle_Deprecated medial_delt_l: max_isometric_force=1142.6 optimal_fiber_length=0.0976
        tendon_slack_length=0.093 pennation_angle_at_optimal=0.3839724
      PathPoint DELT1-P1: humerus_l (0.00896 -0.11883 -0.00585)
      PathPoint DELT1-P2: humerus_l (0.016 0.025 -0.03)
      PathPoint DELT1-P3: torso (0.02 0.41 -0.135)
    Schutte1993Muscle_Deprecated post_delt_r: max_isometric_force=259.88 optimal_fiber_length=0.1367
        tendon_slack_length=0.038 pennation_angle_at_optimal=0.3141593
      PathPoint DELT1-P1: humerus_r (0.00896 -0.11883 0.00585)
      PathPoint DELT1-P2: humerus_r (-0.01623 -0.11033 0.00412)
      PathPoint DELT1-P3: torso (-0.07 0.3 0.15)
      PathPoint DELT1-P3: torso (-0.07 0.35 0.1)
    Schutte1993Muscle_Deprecated post_delt_l: max_isometric_force=259.88 optimal_fiber_length=0.1367
        tendon_slack_length=0.038 pennation_angle_at_optimal=0.3141593
      PathPoint DELT1-P1: humerus_l (0.00896 -0.11883 -0.00585)
      PathPoint DELT1-P2: humerus_l (-0.01623 -0.11033 -0.00412)
      PathPoint DELT1-P3: torso (-0.07 0.3 -0.15)
      PathPoint DELT1-P3: torso (-0.07 0.35 -0.1)
    Schutte1993Muscle_Deprecated medial_delt_r: max_isometric_force=1142.6 optimal_fiber_length=0.0976
        tendon_slack_length=0.093 pennation_angle_at_optimal=0.3839724
      PathPoint DELT1-P1: humerus_r (0.00896 -0.11883 0.00585)
      PathPoint DELT1-P2: humerus_r (0.016 0.025 0.03)
      PathPoint DELT1-P3: torso (0.02 0.41 0.135)
    Schutte1993Muscle_Deprecated TRIlong: max_isometric_force=798.52 optimal_fiber_length=0.134
        tendon_slack_length=0.143 pennation_angle_at_optimal=0.2094395
      PathPoint P1: torso (-0.02 0.38 0.15)
      PathPoint P2: humerus_r (-0.02714 -0.11441 -0.00664)
      PathPoint P3: humerus_r (-0.03184 -0.22637 -0.01217)
      PathPoint P4: humerus_r (-0.01743 -0.26757 -0.01208)
      PathPoint P5: ulna_r (-0.0219 0.01046 -0.00078)
    Schutte1993Muscle_Deprecated TRIlong_l: max_isometric_force=798.52 optimal_fiber_length=0.134
        tendon_slack_length=0.143 pennation_angle_at_optimal=0.2094395
      PathPoint TRIlong-P1: torso (-0.02 0.38 -0.15)
      PathPoint TRIlong-P2: humerus_l (-0.02714 -0.11441 0.00664)
      PathPoint TRIlong-P3: humerus_l (-0.03184 -0.22637 0.01217)
      PathPoint TRIlong-P4: humerus_l (-0.01743 -0.26757 0.01208)
      PathPoint TRIlong-P5: ulna_l (-0.0219 0.01046 0.00078)
    Schutte1993Muscle_Deprecated TRIlat: max_isometric_force=624.3 optimal_fiber_length=0.1138
        tendon_slack_length=0.098 pennation_angle_at_optimal=0.1570796
      PathPoint P1: humerus_r (-0.00599 -0.12646 0.00428)
      PathPoint P2: humerus_r (-0.02344 -0.14528 0.00928)
      PathPoint P3: humerus_r (-0.03184 -0.22637 -0.01217)
      PathPoint P4: humerus_r (-0.01743 -0.26757 -0.01208)
      PathPoint P5: ulna_r (-0.0219 0.01046 -0.00078)
    Schutte1993Muscle_Deprecated TRIlat_l: max_isometric_force=624.3 optimal_fiber_length=0.1138
        tendon_slack_length=0.098 pennation_angle_at_optimal=0.1570796
      PathPoint P1: humerus_l (-0.00599 -0.12646 -0.00428)
      PathPoint P2: humerus_l (-0.02344 -0.14528 -0.00928)
      PathPoint P3: humerus_l (-0.03184 -0.22637 0.01217)
      PathPoint P4: humerus_l (-0.01743 -0.26757 0.01208)
      PathPoint P5: ulna_l (-0.0219 0.01046 0.00078)
    Schutte1993Muscle_Deprecated BIClong: max_isometric_force=624.3 optimal_fiber_length=0.1157
        tendon_slack_length=0.2723 pennation_angle_at_optimal=0
      PathPoint P1: torso (0.03 0.37 0.15)
      PathPoint P2: torso (0.03 0.385 0.16)
      PathPoint P3: humerus_r (0.02131 0.018 0.01)
      PathPoint P4: humerus_r (0.02378 -0.00511 0.01201)
      PathPoint P5: humerus_r (0.016 -0.028 0.00136)
      PathPoint P6: humerus_r (0.013 -0.077 -0.00165)
      PathPoint P7: humerus_r (0.01703 -0.12125 0.00024)
      PathPoint P8: humerus_r (0.0228 -0.1754 -0.0063)
      PathPoint BIClong_l-P9: humerus_r (0.035 -0.28 -0.006)
      PathPoint P10: radius_r (-0.002 -0.0375 -0.002)
    Schutte1993Muscle_Deprecated BIClong_l: max_isometric_force=624.3 optimal_fiber_length=0.1157
        tendon_slack_length=0.2723 pennation_angle_at_optimal=0
      PathPoint P1: torso (0.03 0.37 -0.15)
      PathPoint P2: torso (0.03 0.385 -0.16)
      PathPoint P3: humerus_l (0.02131 0.018 -0.01)
      PathPoint P4: humerus_l (0.02378 -0.00511 -0.01201)
      PathPoint P5: humerus_l (0.016 -0.028 -0.00136)
      PathPoint P6: humerus_l (0.013 -0.077 0.00165)
      PathPoint P7: humerus_l (0.01703 -0.12125 -0.00024)
      PathPoint P8: humerus_l (0.0228 -0.1754 0.0063)
      PathPoint P9: humerus_l (0.035 -0.28 0.006)
      PathPoint P10: radius_l (-0.002 -0.0375 0.002)
    Schutte1993Muscle_Deprecated BRD: max_isometric_force=261.33 optimal_fiber_length=0.1726 tendon_slack_length=0.133
        pennation_angle_at_optimal=0
      PathPoint P1: humerus_r (0.01 -0.2 0.00223)
      PathPoint P2: radius_r (0 0.02 0.023)
      PathPoint P3: radius_r (0 -0.23 0.04)
    Schutte1993Muscle_Deprecated BRD_l: max_isometric_force=261.33 optimal_fiber_length=0.1726
        tendon_slack_length=0.133 pennation_angle_at_optimal=0
      PathPoint P1: humerus_l (0.01 -0.2 -0.00223)
      PathPoint P2: radius_l (0 0.02 -0.023)
      PathPoint P3: radius_l (0 -0.23 -0.04)
    Schutte1993Muscle_Deprecated PT: max_isometric_force=566.22 optimal_fiber_length=0.098 tendon_slack_length=0.224
        pennation_angle_at_optimal=0.1745329
      PathPoint P1: humerus_r (0.0036 -0.2759 -0.0365)
      PathPoint P2: ulna_r (0 -0.035 -0.014)
      PathPoint P3: radius_r (0.01 -0.09 0.025)
      PathPoint P4: radius_r (-0.025 -0.13 0.03)
    Schutte1993Muscle_Deprecated PT_l: max_isometric_force=566.22 optimal_fiber_length=0.098 tendon_slack_length=0.224
        pennation_angle_at_optimal=0.1745329
      PathPoint P1: humerus_l (0.0036 -0.2759 0.036)
      PathPoint P2: ulna_l (0 -0.035 0.014)
      PathPoint P3: radius_l (0.01 -0.09 -0.025)
      PathPoint P4: radius_l (-0.025 -0.13 -0.03)
    Schutte1993Muscle_Deprecated LAT2: max_isometric_force=389.1 optimal_fiber_length=0.2324 tendon_slack_length=0.1765
        pennation_angle_at_optimal=0.3316126
      PathPoint P1: humerus_r (-0.005 -0.04071 -0.006)
      PathPoint P2: torso (-0.12 0.28 0.13)
      PathPoint P3: torso (-0.11 0.24 0.05)
      PathPoint P4: torso (-0.07186 0.18 0.008)
    Schutte1993Muscle_Deprecated LAT2_l: max_isometric_force=389.1 optimal_fiber_length=0.2324
        tendon_slack_length=0.1765 pennation_angle_at_optimal=0.3316126
      PathPoint P1: humerus_l (-0.005 -0.04071 0.006)
      PathPoint P2: torso (-0.12 0.28 -0.13)
      PathPoint P3: torso (-0.11 0.24 -0.05)
      PathPoint P4: torso (-0.07186 0.18 -0.008)
    Schutte1993Muscle_Deprecated PECM2: max_isometric_force=515.41 optimal_fiber_length=0.1385
        tendon_slack_length=0.089 pennation_angle_at_optimal=0.4363323
      PathPoint P1: humerus_r (0.01274 -0.043 -0.008)
      PathPoint P2: torso (0.085 0.32 0.1)
      PathPoint P3: torso (0.085 0.32 0.05)
      PathPoint P4: torso (0.02769 0.32 0.023)
    Schutte1993Muscle_Deprecated PECM2_l: max_isometric_force=515.41 optimal_fiber_length=0.1385
        tendon_slack_length=0.089 pennation_angle_at_optimal=0.4363323
      PathPoint PECM2-P1_l: humerus_l (0.01274 -0.043 0.008)
      PathPoint PECM2-P2_l: torso (0.085 0.32 -0.1)
      PathPoint PECM2-P3_l: torso (0.085 0.32 -0.05)
      PathPoint PECM2-P4_l: torso (0.02769 0.32 -0.023)
    ObjectGroup R_shoulder: members=(ant_delt_r post_delt_r medial_delt_r PECM2 LAT2)
    ObjectGroup L_shoulder: members=(ant_delt_l post_delt_l medial_delt_l PECM2_l LAT2_l)
    ObjectGroup R_elbow: members=(TRIlong TRIlat BIClong BRD)
    ObjectGroup L_elbow: members=(TRIlong_l TRIlat_l BIClong_l BRD_l)
    ObjectGroup R_wrist: members=(FCR ECRL PT)
    ObjectGroup L_wrist: members=(FCR_l ECRL_l PT_l)
  MarkerSet:
    Marker STR: torso (0.1 0.22 0)
    Marker C7: torso (-0.076 0.43 0)
    Marker T10: torso (-0.11 0.21 0)
    Marker RBAK: torso (-0.1 0.25 0.1)
    Marker SUP: torso (0.05 0.38 0)
    Marker RLHE: humerus_r (0.025 -0.27 0.038)
    Marker RMHE: humerus_r (0.001 -0.28 -0.045)
    Marker REJC: humerus_r (-0.025 -0.28069 -0.0002)
    Marker REJC2: humerus_r (0.025 -0.21069 -0.0002)
    Marker RUS: radius_r (-0.015 -0.23 -0.018)
    Marker RRS: radius_r (-0.003 -0.23 0.05)
    Marker RWJC: radius_r (-0.035 -0.23187 0.017)
    Marker RWJC2: radius_r (-0.03 -0.16187 0.003)
    Marker LLHE: humerus_l (0.025 -0.27 -0.038)
    Marker LMHE: humerus_l (0.001 -0.28 0.045)
    Marker LEJC: humerus_l (-0.025 -0.28069 0.0002)
    Marker LEJC2: humerus_l (0.025 -0.21069 0.0002)
    Marker LUS: radius_l (-0.015 -0.23 0.018)
    Marker LRS: radius_l (-0.00316 -0.22312 -0.04988)
    Marker LWJC: radius_l (-0.035 -0.23187 -0.017)
    Marker LWJC2: radius_l (-0.03 -0.16187 0.003)
    Marker SEL: head_and_neck (0.12 0.17 0.004)
    Marker OCC: head_and_neck (-0.1 0.14 0)
    Marker RTEMP: head_and_neck (0.02 0.15 0.1)
    Marker HV: head_and_neck (0 0.23 0)
    Marker HL1: hand_l (0.0025 -0.082 -0.054)
    Marker HL2: hand_l (0.0025 -0.102 -0.024)
    Marker HL3: hand_l (0.0025 -0.122 0.024)
    Marker HL4: hand_l (0.0025 -0.122 0.054)
    Marker HR1: hand_r (0.0025 -0.082 -0.054)
    Marker HR2: hand_r (0.0025 -0.102 -0.024)
    Marker HR3: hand_r (0.0025 -0.122 0.024)
    Marker HR4: hand_r (0.0025 -0.122 0.054)
