# OpenSim document version 40600
Model ScapulothoracicJoint_Shoulder:
  gravity: 0 -9.80665 0
  length_units: meters
  force_units: N
  credits:
    Model constructed by Ricardo Matias and Ajay Seth. Scapulothoracic joint developed by Seth et al. [1]; segment dimensions and joint locations were obtained from Holzbaur et al. [2], and segment inertial properties obtained from Breteler et al. [3]
  publications:
    [1] Seth A, Matias R, Veloso A, Delp SL. A biomechanical model of the scapulothoracic joint to accurately capture scapula kinematics during shoulder movements. PLoS One. 2015. [2] Holzbaur KRS, Murray WM, Delp SL. A Model of the Upper Extremity for Simulating Musculoskeletal Surgery and Analyzing Neuromuscular Control. Ann Biomed Eng 33:829–840. 2005. [3] Breteler KMD, Spoor CW, Van der Helm FC. Measuring muscle and joint geometry parameters of a shoulder for modeling purposes. J Biomech 32:1191–7. 1999.
  Ground
  BodySet:
    Body thorax: mass=20 [kg] mass_center=(-0.0591 -0.1486 0) inertia=(1.29841 0.55245 1.29841 0 0 0)
        meshes=(thorax.vtp groundspine.vtp)
      WrapEllipsoid ScapulothoracicEllipsoid: translation=(-0.02 -0.0173 0.0609) quadrant=all
          dimensions=(0.07 0.15 0.07)
    Body clavicle: mass=0.156 mass_center=(-0.02172 0.01007 0.06704)
        inertia=(6.4e-6 2.63e-5 2.43e-5 -6.7e-6 -9.5e-6 2.9e-6) meshes=clavicle.vtp
    Body scapula: mass=0.7054 mass_center=(-0.04612 -0.0319 -0.04565) inertia=(0.001 0.001 0.001 0 0 0)
        meshes=scapula.vtp
    Body humerus: mass=2.0519 mass_center=(0.00537 -0.11493 -0.00261) inertia=(0.0132 0.001988 0.0132 0 0 0)
        meshes=humerus.vtp
    Body ulna: mass=0.5464 mass_center=(-0.00927581 -0.105108 0.0261565) inertia=(0.0030585 0.00045325 0.0030585 0 0 0)
        meshes=ulna.vtp
    Body radius: mass=0.5464 mass_center=(0.0154894 -0.104396 0.0138558) inertia=(0.0030585 0.00045325 0.0030585 0 0 0)
        meshes=radius.vtp
    Body hand: mass=0.525 mass_center=(0.0006 -0.0905 -0.0365) inertia=(0.0006387 0.0001904 0.0006387 0 0 0)
        meshes=(lunate.vtp scaphoid.vtp pisiform.vtp triquetrum.vtp capitate.vtp trapezium.vtp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)
  JointSet:
    CustomJoint ground_thorax: socket_parent_frame=ground_offset socket_child_frame=thorax_offset
      Coordinate ground_thorax_rot_x: default_value=0 range=(-100 100) clamped=true
      Coordinate ground_thorax_rot_y: default_value=0 range=(-100 100) clamped=true
      Coordinate ground_thorax_rot_z: default_value=0 range=(-100 100) clamped=true
      Coordinate ground_thorax_tx: default_value=0 range=(-10 10) clamped=false
      Coordinate ground_thorax_ty: default_value=0 range=(-10 10) clamped=false
      Coordinate ground_thorax_tz: default_value=0 range=(-10 10) clamped=false
      PhysicalOffsetFrame ground_offset: socket_parent=/ground translation=(-0.0511446 0.1817492 -0.02037649) [meters]
      PhysicalOffsetFrame thorax_offset: socket_parent=/bodyset/thorax translation=(0.1958008 -0.6972998 0.03334117)
      SpatialTransform:
        TransformAxis rotation1: coordinates=ground_thorax_rot_x axis=(1 0 0) LinearFunction(coefficients=1 0)
        TransformAxis rotation2: coordinates=ground_thorax_rot_y axis=(0 1 0) LinearFunction(coefficients=1 0)
        TransformAxis rotation3: coordinates=ground_thorax_rot_z axis=(0 0 1) LinearFunction(coefficients=1 0)
        TransformAxis translation1: coordinates=ground_thorax_tx axis=(1 0 0) LinearFunction(coefficients=1 0)
        TransformAxis translation2: coordinates=ground_thorax_ty axis=(0 1 0) LinearFunction(coefficients=1 0)
        TransformAxis translation3: coordinates=ground_thorax_tz axis=(0 0 1) LinearFunction(coefficients=1 0)
    CustomJoint sternoclavicular: socket_parent_frame=thorax_offset socket_child_frame=clavicle_offset
      Coordinate clav_prot: default_value=0 range=(-0.7853982 0.7853982) clamped=true
      Coordinate clav_elev: default_value=0 range=(-0.7853982 0.7853982) clamped=true
      PhysicalOffsetFrame thorax_offset: socket_parent=/bodyset/thorax translation=(0.006325 0.00693 0.025465)
      PhysicalOffsetFrame clavicle_offset: socket_parent=/bodyset/clavicle translation=(0 0 0)
      SpatialTransform: axes_held_at_zero=(rotation3 translation1 translation2 translation3)
        TransformAxis rotation1: coordinates=clav_prot axis=(0.0153 0.9892987 -0.1451) LinearFunction(coefficients=1 0)
        TransformAxis rotation2: coordinates=clav_elev axis=(-0.9944725 0 -0.104997) LinearFunction(coefficients=1 0)
    ScapulothoracicJoint scapulothoracic: socket_parent_frame=thorax_offset socket_child_frame=scapula_offset
        thoracic_ellipsoid_radii_x_y_z=(0.07 0.15 0.07) scapula_winging_axis_origin=(0 0)
        scapula_winging_axis_direction=0 [radians]
      Coordinate scapula_abduction: default_value=0 range=(-0.7853982 0.7853982) clamped=true
      Coordinate scapula_elevation: default_value=0 range=(-0.7853982 0.7853982) clamped=true
      Coordinate scapula_upward_rot: default_value=0 range=(-0.7853982 0.7853982) clamped=true
      Coordinate scapula_winging: default_value=0 range=(-0.7853982 0.7853982) clamped=false
      PhysicalOffsetFrame thorax_offset: socket_parent=/bodyset/thorax translation=(-0.02 -0.0173 0.07)
          orientation=(0 -0.87 0) [radians]
      PhysicalOffsetFrame scapula_offset: socket_parent=/bodyset/scapula translation=(-0.05982 -0.03904 -0.056)
          orientation=(-0.5181 -1.1416 -0.2854)
    CustomJoint glenohumeral: socket_parent_frame=scapula_offset socket_child_frame=humerus_offset
      Coordinate shoulder_elv: default_value=0.1745329 range=(-1.570796 2.53) clamped=false
      Coordinate plane_of_elev: default_value=0 range=(-1.570796 3.141593) clamped=true
      Coordinate axial_rot: default_value=0 range=(-3.141593 3.141593) clamped=true
      PhysicalOffsetFrame scapula_offset: socket_parent=/bodyset/scapula translation=(-0.00955 -0.034 0.009)
      PhysicalOffsetFrame humerus_offset: socket_parent=/bodyset/humerus translation=(0 0 0)
      SpatialTransform: axes_held_at_zero=(translation1 translation2 translation3)
        TransformAxis rotation1: coordinates=shoulder_elv axis=(-0.993 -0.0793 0.0879) LinearFunction(coefficients=1 0)
        TransformAxis rotation2: coordinates=plane_of_elev axis=(0.0828 0.0654 0.9944) LinearFunction(coefficients=1 0)
        TransformAxis rotation3: coordinates=axial_rot axis=(-0.0846 0.9947 -0.0584) LinearFunction(coefficients=1 0)
    CustomJoint elbow: socket_parent_frame=humerus_offset socket_child_frame=ulna_offset
      Coordinate elbow_flexion: default_value=0 range=(0 3.141593) clamped=false
      PhysicalOffsetFrame humerus_offset: socket_parent=/bodyset/humerus translation=(0.0061 -0.2904 -0.0123)
      PhysicalOffsetFrame ulna_offset: socket_parent=/bodyset/ulna translation=(0 0 0)
      SpatialTransform: axes_held_at_zero=(rotation1 rotation2 translation1 translation2 translation3)
        TransformAxis rotation3: coordinates=elbow_flexion axis=(0.04940001 0.03660001 0.9981083)
            LinearFunction(coefficients=1 0)
    CustomJoint radioulnar: socket_parent_frame=ulna_offset socket_child_frame=radius_offset
      Coordinate pro_sup: default_value=-1.570796 range=(-1.570796 1.570796) clamped=false
      PhysicalOffsetFrame ulna_offset: socket_parent=/bodyset/ulna translation=(0.0004 -0.011503 0.019999)
      PhysicalOffsetFrame radius_offset: socket_parent=/bodyset/radius translation=(0 0 0)
      SpatialTransform: axes_held_at_zero=(rotation1 rotation3 translation1 translation2 translation3)
        TransformAxis rotation2: coordinates=pro_sup axis=(-0.01716099 0.9926656 -0.119668)
            LinearFunction(coefficients=1 0)
    WeldJoint rc: socket_parent_frame=radius_offset socket_child_frame=hand_offset
      PhysicalOffsetFrame radius_offset: socket_parent=/bodyset/radius translation=(0.018 -0.242 0.025)
      PhysicalOffsetFrame hand_offset: socket_parent=/bodyset/hand translation=(0 0 0)
  ConstraintSet:
    PointConstraint AC: socket_body_1=/bodyset/clavicle socket_body_2=/bodyset/scapula
        location_body_1=(-0.02924 0.02024 0.12005) location_body_2=(-0.01357 0.00011 -0.01523)
  ForceSet:
    CoordinateLimitForce [values shared by the 5 below unless stated]: upper_stiffness=20 [N*m/degree]
        lower_stiffness=20 [N*m/degree] damping=1 transition=10 [degrees]
    CoordinateLimitForce ClavicleElevationLimits: coordinate=clav_elev upper_limit=25 [degrees]
        lower_limit=-20 [degrees]
    CoordinateLimitForce ClavicleProtractionLimits: coordinate=clav_prot upper_limit=25 lower_limit=-10
    CoordinateLimitForce ScapulaRotationLimits: coordinate=scapula_upward_rot upper_limit=50 lower_limit=-20
    CoordinateLimitForce ShoulderRotationLimits: coordinate=shoulder_elv upper_limit=180 lower_limit=-85
    CoordinateLimitForce ElbowFlexLimit: coordinate=elbow_flexion upper_limit=140 lower_limit=0
  MarkerSet:
    Marker MAN: thorax (0 0 0)
    Marker CLAG: thorax (-0.007417962 0.004904041 -0.0627328)
    Marker C7: thorax (-0.0899063 0.0327569 0)
    Marker T8: thorax (-0.111155 -0.154433 0)
    Marker XYP: thorax (0.0697635 -0.164311 0)
    Marker ACD: clavicle (-0.028301 0.018552 0.117034)
    Marker MTACB: scapula (-0.09522767 -0.07119247 -0.03929506)
    Marker MTACM: scapula (-0.09964331 -0.02333255 -0.07544362)
    Marker MTACL: scapula (-0.05408333 -0.0186769 -0.02321635)
    Marker EL: humerus (0.00134695 -0.285625 0.022249)
    Marker EM: humerus (0.00148415 -0.282015 -0.0446513)
    Marker PSR: radius (0.04081283 -0.2400391 0.01593793)
    Marker PSU: ulna (-0.002153654 -0.2482745 0.0466656)
    Marker CLAD: clavicle (-0.001727158 0.001798626 0.04665966)
